# Range vs E and H Phase Difference
r := 0, 0.01 .. 0.4  # r is normalized to λ
Δ_ϕ(r) := 180/π*acot((2*π*r)^3)
# [plot: Δ_ϕ(r) vs r]
# References:
# http://loop-antennas.ceyhunsezenoglu.com/en/latest/em-modeling/near-field-propagation.html
